/BATCH
! /COM,ANSYS RELEASE 12.1    UP20091102       15:29:11    12/01/2016
/input,menust,tmp,'',,,,,,,,,,,,,,,,1
! /GRA,POWER
! /GST,ON
! /PLO,INFO,3
! /GRO,CURL,ON
! /CPLANE,1
! /REPLOT,RESIZE
WPSTYLE,,,,,,,,0
! /COM,ANSYS RELEASE 12.1    UP20091102       14:09:57    12/01/2016
/input,menust,tmp,'',,,,,,,,,,,,,,,,1
! /GRA,POWER
! /GST,ON
! /PLO,INFO,3
! /GRO,CURL,ON
! /CPLANE,1
! /REPLOT,RESIZE
WPSTYLE,,,,,,,,0
! /COM,ANSYS RELEASE 12.1    UP20091102       13:52:03    12/01/2016
/input,start121,ans,'C:\Program Files\ANSYS Inc\v121\ANSYS\apdl\',,,,,,,,,,,,,,,,1
! /COM,ANSYS RELEASE Release 16.0      BUILD 16.0      UP20141203       14:51:52
/input,menust,tmp,''
! /GRA,POWER
! /GST,ON
! /PLO,INFO,3
! /GRO,CURL,ON
! /CPLANE,1
! /REPLOT,RESIZE
WPSTYLE,,,,,,,,0
FINISH
! /EXIT,NOSAV
! /COM,ANSYS RELEASE 12.1    UP20091102       11:48:31    09/16/2015
/input,menust,tmp,'',,,,,,,,,,,,,,,,1
! /GRA,POWER
! /GST,ON
! /PLO,INFO,3
! /GRO,CURL,ON
! /CPLANE,1
! /REPLOT,RESIZE
WPSTYLE,,,,,,,,0
/SOLU
FINISH
! /EXIT,NOSAV
! /COM,ANSYS RELEASE 12.1    UP20091102       13:10:08    12/01/2016
/input,menust,tmp,'',,,,,,,,,,,,,,,,1
! /GRA,POWER
! /GST,ON
! /PLO,INFO,3
! /GRO,CURL,ON
! /CPLANE,1
! /REPLOT,RESIZE
WPSTYLE,,,,,,,,0
/PREP7
!*
ET,1,SOLID45
!*
!*
!*
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!*
K,1,0,37e-9,0,
K,2,18.5e-9,32.04293994e-9,0,
K,3,32.04293994e-9,18.5e-9,0,
K,4,37e-9,0,0,
K,5,32.04293994e-9,-18.5e-9,0,
K,6,18.5e-9,-32.04293994e-9,0,
K,7,0,-37e-9,0,
K,8,-18.5e-9,-32.04293994e-9,0,
K,9,-32.04293994e-9,-18.5e-9,0,
K,10,-37e-9,0,0,
K,11,-32.04293994e-9,18.5e-9,0,
K,12,-18.5e-9,32.04293994e-9,0,
K,13,0,0,0,
K,14,0,5e-9,190e-9,
K,15,2.5e-9,4.330127019e-9,190e-9,
K,16,4.330127019e-9,2.5e-9,190e-9,
K,17,5e-9,0,190e-9
K,18,4.330127019e-9,-2.5e-9,190e-9
K,19,2.5e-9,-4.330127019e-9,190e-9
K,20,0,-5e-9,190e-9
K,21,-2.5e-9,-4.330127019e-9,190e-9
K,22,-4.330127019e-9,-2.5e-9,190e-9
K,23,-5e-9,0,190e-9
K,24,-4.330127019e-9,2.5e-9,190e-9
K,25,-2.5e-9,4.330127019e-9,190e-9
K,26,0,0,190e-9
!*
MPTEMP,,,,,,,,
MPTEMP,1,0
MPDATA,EX,1,,203.4e9
MPDATA,PRXY,1,,0.3
MPTEMP,,,,,,,,
MPTEMP,1,0
MPDE,EX,1
MPDE,PRXY,1
MPDATA,EX,1,,2.034E+011
MPDATA,PRXY,1,,0.3
! /VIEW,1,1,1,1
! /ANG,1
! /REP,FAST
LSTR,       1,       2
LSTR,       2,       3
LSTR,       3,       4
LSTR,       4,       5
LSTR,       5,       6
LSTR,       6,       7
LSTR,       7,       8
LSTR,       8,       9
LSTR,       9,      10
LSTR,      10,      11
LSTR,      11,      12
LSTR,      12,       1
! /DIST,1,0.729,1
! /REP,FAST
! /USER,  1
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! /REP,FAST
LSTR,      14,      15
LSTR,      15,      16
LSTR,      16,      17
LSTR,      17,      18
LSTR,      18,      19
LSTR,      19,      20
LSTR,      20,      21
LSTR,      21,      22
LSTR,      22,      23
LSTR,      23,      24
LSTR,      24,      25
LSTR,      25,      14
LSTR,      14,      26
LSTR,      26,      16
LSTR,      26,      18
LSTR,      26,      20
LSTR,      26,      22
LSTR,      26,      24
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! /REP,FAST
LSTR,       1,      13
LSTR,      13,       4
! LPLOT
LDELE,      32
LSTR,      13,       3
LSTR,      13,       5
LSTR,      13,       7
LSTR,      13,       9
LSTR,      13,      11
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! /REP,FAST
! /PNUM,KP,1
! /PNUM,LINE,0
! /PNUM,AREA,0
! /PNUM,VOLU,0
! /PNUM,NODE,0
! /PNUM,TABN,0
! /PNUM,SVAL,0
! /NUMBER,0
!*
! /PNUM,ELEM,0
! /REPLOT
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! /REP,FAST
LSTR,       1,      14
LSTR,      15,       2
LSTR,       3,      16
LSTR,       4,      17
LSTR,       5,      18
LSTR,      12,      25
! /VIEW,  1,  0.249895140384E-01,  0.516120812429E-01,  0.998354504802
! /ANG,   1,  -17.0482955275
! /REPLO
! /VIEW,  1, -0.119544325654    , -0.327569973651    ,  0.937233731023
! /ANG,   1,  -16.7203618763
! /REPLO
LSTR,      10,      23
LSTR,       9,      22
LSTR,       8,      21
LSTR,       7,      20
LSTR,      19,       6
! /VIEW,  1,  0.940533467414E-01, -0.159408974373    ,  0.982722110699
! /ANG,   1,  -21.4552076110
! /REPLO
! /VIEW,  1,  0.309410118423E-01, -0.109578913188    ,  0.993496409440
! /ANG,   1,  -23.8572557315
! /REPLO
LSTR,      11,      24
! /VIEW,  1,  0.142576075286    , -0.180339391841E-02,  0.989782203581
! /ANG,   1,  -24.7585648457
! /REPLO
! /VIEW,  1,  0.150011712008    , -0.311983249017    ,  0.938169994507
! /ANG,   1,  -20.7912291613
! /REPLO
! /VIEW,  1,  0.974640976091E-01, -0.192063546349    ,  0.976530769531
! /ANG,   1,  -19.9487721248
! /REPLO
FLST,2,4,3
FITEM,2,1
FITEM,2,2
FITEM,2,3
FITEM,2,13
A,P51X
FLST,2,4,3
FITEM,2,3
FITEM,2,13
FITEM,2,5
FITEM,2,4
A,P51X
FLST,2,4,3
FITEM,2,5
FITEM,2,6
FITEM,2,7
FITEM,2,13
A,P51X
FLST,2,4,3
FITEM,2,13
FITEM,2,7
FITEM,2,8
FITEM,2,9
A,P51X
FLST,2,4,3
FITEM,2,13
FITEM,2,9
FITEM,2,10
FITEM,2,11
A,P51X
FLST,2,4,3
FITEM,2,13
FITEM,2,11
FITEM,2,12
FITEM,2,1
A,P51X
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! /REP,FAST
FLST,2,4,3
FITEM,2,26
FITEM,2,18
FITEM,2,19
FITEM,2,20
A,P51X
FLST,2,4,3
FITEM,2,16
FITEM,2,17
FITEM,2,18
FITEM,2,26
A,P51X
FLST,2,4,3
FITEM,2,26
FITEM,2,14
FITEM,2,15
FITEM,2,16
A,P51X
FLST,2,4,3
FITEM,2,26
FITEM,2,14
FITEM,2,25
FITEM,2,24
A,P51X
FLST,2,4,3
FITEM,2,26
FITEM,2,22
FITEM,2,23
FITEM,2,24
A,P51X
FLST,2,4,3
FITEM,2,26
FITEM,2,20
FITEM,2,21
FITEM,2,22
A,P51X
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! /REP,FAST
FLST,2,4,4
FITEM,2,46
FITEM,2,19
FITEM,2,45
FITEM,2,7
AL,P51X
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! /REP,FAST
! APLOT
FLST,2,4,4
FITEM,2,18
FITEM,2,46
FITEM,2,47
FITEM,2,6
AL,P51X
FLST,2,4,4
FITEM,2,17
FITEM,2,41
FITEM,2,5
FITEM,2,47
AL,P51X
FLST,2,4,4
FITEM,2,4
FITEM,2,40
FITEM,2,16
FITEM,2,41
AL,P51X
FLST,2,4,4
FITEM,2,3
FITEM,2,40
FITEM,2,39
FITEM,2,15
AL,P51X
! /VIEW,  1,  0.136505454383    , -0.161526658263    ,  0.977381910818
! /ANG,   1,  -20.4951651483
! /REPLO
! /VIEW,  1,  0.424084636167    ,  0.231687812133E-01,  0.905326145068
! /ANG,   1,  -22.2062601125
! /REPLO
! /VIEW,  1, -0.257329844362    , -0.369983012127    ,  0.892689151910
! /ANG,   1,  -34.2161763320
! /REPLO
FLST,2,4,4
FITEM,2,20
FITEM,2,45
FITEM,2,8
FITEM,2,44
AL,P51X
FLST,2,4,4
FITEM,2,9
FITEM,2,44
FITEM,2,21
FITEM,2,43
AL,P51X
! /VIEW,  1, -0.223014544914    , -0.952762543572E-01,  0.970147900123
! /ANG,   1,  -34.3639639216
! /REPLO
! /VIEW,  1,  0.139695020164    ,  0.156104605557    ,  0.977812176988
! /ANG,   1,  -33.8600939904
! /REPLO
! /VIEW,  1,  0.199247865372    ,  0.114289187978    ,  0.973261665564
! /ANG,   1,  -33.3578368289
! /REPLO
! /VIEW,  1,  0.331293506455E-01, -0.103477571333E-01,  0.999397503523
! /ANG,   1,  -33.8225856843
! /REPLO
FLST,2,4,4
FITEM,2,10
FITEM,2,43
FITEM,2,48
FITEM,2,22
AL,P51X
FLST,2,4,4
FITEM,2,11
FITEM,2,42
FITEM,2,48
FITEM,2,23
AL,P51X
FLST,2,4,4
FITEM,2,24
FITEM,2,37
FITEM,2,12
FITEM,2,42
AL,P51X
FLST,2,4,4
FITEM,2,1
FITEM,2,38
FITEM,2,37
FITEM,2,13
AL,P51X
FLST,2,4,4
FITEM,2,2
FITEM,2,38
FITEM,2,14
FITEM,2,39
AL,P51X
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! /REPLO
FLST,2,24,5,ORDE,2
FITEM,2,1
FITEM,2,-24
VA,P51X
! /VIEW,  1,  0.188773343283    , -0.992502452928E-01,  0.976992330408
! /ANG,   1,  -59.2276735307
! /REPLO
! /VIEW,1,,,1
! /ANG,1
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! /REPLO
FLST,5,12,4,ORDE,2
FITEM,5,37
FITEM,5,-48
CM,_Y,LINE
LSEL, , , ,P51X
CM,_Y1,LINE
CMSEL,S,_Y
!*
!*
LESIZE,_Y1,0, ,8,0,4,0,0
CMDELE,_Y
CMDELE,_Y1
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! /REP,FAST
FLST,5,18,4,ORDE,2
FITEM,5,13
FITEM,5,-30
CM,_Y,LINE
LSEL, , , ,P51X
CM,_Y1,LINE
CMSEL,S,_Y
!*
!*
LESIZE,_Y1,0, ,1,0,4,0,0
CMDELE,_Y
CMDELE,_Y1
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! /REPLO
FLST,5,6,4,ORDE,2
FITEM,5,31
FITEM,5,-36
CM,_Y,LINE
LSEL, , , ,P51X
CM,_Y1,LINE
CMSEL,S,_Y
!*
!*
LESIZE,_Y1,0, ,1,0,4,0,0
CMDELE,_Y
CMDELE,_Y1
!*
CM,_Y,VOLU
VSEL, , , ,       1
CM,_Y1,VOLU
CHKMSH,'VOLU'
CMSEL,S,_Y
!*
VSWEEP,_Y1
!*
CMDELE,_Y
CMDELE,_Y1
CMDELE,_Y2
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! /REPLO
VCLEAR,       1
/UI,MESH,OFF
! LPLOT
! /ZOOM,1,RECT,0.38902,-0.023443 ,0.430981375068 ,-0.0530552267328
! LPLOT
! /AUTO,1
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! /REP,FAST
! /USER,  1
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! /REPLO
FLST,5,12,4,ORDE,2
FITEM,5,1
FITEM,5,-12
CM,_Y,LINE
LSEL, , , ,P51X
CM,_Y1,LINE
CMSEL,S,_Y
!*
!*
LESIZE,_Y1,0, ,1,0,4,0,0
CMDELE,_Y
CMDELE,_Y1
!*
CM,_Y,VOLU
VSEL, , , ,       1
CM,_Y1,VOLU
CHKMSH,'VOLU'
CMSEL,S,_Y
!*
VSWEEP,_Y1
!*
CMDELE,_Y
CMDELE,_Y1
CMDELE,_Y2
!*
/UI,MESH,OFF
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! /REPLO
LSTR,      13,      26
FLST,5,1,4,ORDE,1
FITEM,5,49
CM,_Y,LINE
LSEL, , , ,P51X
CM,_Y1,LINE
CMSEL,S,_Y
!*
!*
LESIZE,_Y1,0, ,8,0,4,0,0
CMDELE,_Y
CMDELE,_Y1
!*
/UI,MESH,OFF
FLST,2,4,4
FITEM,2,31
FITEM,2,49
FITEM,2,37
FITEM,2,25
AL,P51X
FLST,2,4,4
FITEM,2,32
FITEM,2,39
FITEM,2,26
FITEM,2,49
AL,P51X
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! /REP,FAST
FLST,2,4,4
FITEM,2,33
FITEM,2,41
FITEM,2,27
FITEM,2,49
AL,P51X
FLST,2,4,4
FITEM,2,34
FITEM,2,46
FITEM,2,28
FITEM,2,49
AL,P51X
FLST,2,4,4
FITEM,2,35
FITEM,2,44
FITEM,2,29
FITEM,2,49
AL,P51X
FLST,2,4,4
FITEM,2,36
FITEM,2,49
FITEM,2,30
FITEM,2,48
AL,P51X
! LPLOT
! LPLOT
! APLOT
! LPLOT
FLST,2,30,5,ORDE,2
FITEM,2,1
FITEM,2,-30
VA,P51X
FLST,2,6,5,ORDE,6
FITEM,2,2
FITEM,2,8
FITEM,2,16
FITEM,2,-17
FITEM,2,26
FITEM,2,-27
VA,P51X
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! /REPLO
! VPLOT
! VPLOT
! APLOT
! vlist, all
! VPLOT
FLST,5,2,6,ORDE,2
FITEM,5,1
FITEM,5,-2
CM,_Y,VOLU
VSEL, , , ,P51X
CM,_Y1,VOLU
CHKMSH,'VOLU'
CMSEL,S,_Y
!*
VSWEEP,_Y1
!*
CMDELE,_Y
CMDELE,_Y1
CMDELE,_Y2
!*
/UI,MESH,OFF
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! /ANG,   1,  -11.5274278026
! /LIG,   1,1, 1.000,   0.00000000000    ,   0.00000000000    ,   0.00000000000    ,   0.00000000000
! /REPLO
FLST,2,30,5,ORDE,2
FITEM,2,1
FITEM,2,-30
VA,P51X
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! /ANG,   1,  -35.5316417308
! /LIG,   1,1, 1.000,   0.00000000000    ,   0.00000000000    ,   0.00000000000    ,   0.00000000000
! /REPLO
FLST,2,6,5,ORDE,6
FITEM,2,3
FITEM,2,7
FITEM,2,14
FITEM,2,-15
FITEM,2,27
FITEM,2,-28
VA,P51X
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! /REPLO
FLST,5,3,6,ORDE,2
FITEM,5,1
FITEM,5,-3
CM,_Y,VOLU
VSEL, , , ,P51X
CM,_Y1,VOLU
CHKMSH,'VOLU'
CMSEL,S,_Y
!*
!*
VCLEAR,_Y1
VSWEEP,_Y1
!*
CMDELE,_Y
CMDELE,_Y1
CMDELE,_Y2
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! /REPLO
FLST,2,6,5,ORDE,6
FITEM,2,4
FITEM,2,12
FITEM,2,-13
FITEM,2,18
FITEM,2,28
FITEM,2,-29
VA,P51X
FLST,5,4,6,ORDE,2
FITEM,5,1
FITEM,5,-4
CM,_Y,VOLU
VSEL, , , ,P51X
CM,_Y1,VOLU
CHKMSH,'VOLU'
CMSEL,S,_Y
!*
!*
VCLEAR,_Y1
VSWEEP,_Y1
!*
CMDELE,_Y
CMDELE,_Y1
CMDELE,_Y2
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! /REPLO
FLST,2,6,5,ORDE,6
FITEM,2,5
FITEM,2,11
FITEM,2,19
FITEM,2,-20
FITEM,2,29
FITEM,2,-30
VA,P51X
FLST,5,5,6,ORDE,2
FITEM,5,1
FITEM,5,-5
CM,_Y,VOLU
VSEL, , , ,P51X
CM,_Y1,VOLU
CHKMSH,'VOLU'
CMSEL,S,_Y
!*
!*
VCLEAR,_Y1
VSWEEP,_Y1
!*
CMDELE,_Y
CMDELE,_Y1
CMDELE,_Y2
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! /REPLO
FLST,2,6,5,ORDE,6
FITEM,2,6
FITEM,2,10
FITEM,2,21
FITEM,2,-22
FITEM,2,25
FITEM,2,30
VA,P51X
FLST,5,6,6,ORDE,2
FITEM,5,1
FITEM,5,-6
CM,_Y,VOLU
VSEL, , , ,P51X
CM,_Y1,VOLU
CHKMSH,'VOLU'
CMSEL,S,_Y
!*
!*
VCLEAR,_Y1
VSWEEP,_Y1
!*
CMDELE,_Y
CMDELE,_Y1
CMDELE,_Y2
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! /REPLO
FLST,2,6,5,ORDE,4
FITEM,2,1
FITEM,2,9
FITEM,2,23
FITEM,2,-26
VA,P51X
FLST,5,7,6,ORDE,2
FITEM,5,1
FITEM,5,-7
CM,_Y,VOLU
VSEL, , , ,P51X
CM,_Y1,VOLU
CHKMSH,'VOLU'
CMSEL,S,_Y
!*
!*
VCLEAR,_Y1
VSWEEP,_Y1
!*
CMDELE,_Y
CMDELE,_Y1
CMDELE,_Y2
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! /REP,FAST
! SAVE, tapered_cylinder,db,C:\Users\ecslogon\Desktop\
/UI,MESH,OFF
! LGWRITE,'tapered_cylinder','lgw','C:\Users\ecslogon\Desktop\',COMMENT
