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/BATCH
/COM,ANSYS RELEASE 12.1    UP20091102       14:02:43    12/01/2016
/input,menust,tmp,'',,,,,,,,,,,,,,,,1
/GST,ON
/PLO,INFO,3
/GRO,CURL,ON
/CPLANE,1
WPSTYLE,,,,,,,,0
/NOPR
/PMETH,OFF,0
KEYW,PR_SET,1
KEYW,PR_STRUC,1
KEYW,PR_THERM,0
KEYW,PR_FLUID,0
KEYW,PR_ELMAG,0
KEYW,MAGNOD,0
KEYW,MAGEDG,0
KEYW,MAGHFE,0
KEYW,MAGELC,0
KEYW,PR_MULTI,0
KEYW,PR_CFD,0
/GO
/COM,
/COM,Preferences for GUI filtering have been set to display:
/COM,  Structural
/PREP7
ET,1,SOLID45
MPTEMP,,,,,,,,
MPTEMP,1,0
MPDATA,EX,1,,203.4e9
MPDATA,PRXY,1,,0.3
K,1,0,0,0,
K,2,74e-9,0,0,
K,3,7.4e-008,74e-9,0,
K,4,0,7.4e-008,0,
K,5,32e-9,32e-9,190e-9,
K,6,4.2e-008,3.2e-008,1.9e-007,
K,7,4.2e-008,4.2e-008,1.9e-007,
K,8,0,4.2e-008,1.9e-007,
KDELE,       8
K,8,32e-9,4.2e-008,1.9e-007,
LSTR,       7,       8
LSTR,       8,       5
LSTR,       5,       6
LSTR,       6,       7
LSTR,       5,       1
LSTR,       7,       3
LSTR,       8,       4
LSTR,       6,       2
LSTR,       4,       1
LSTR,       1,       2
LSTR,       3,       2
LSTR,       3,       4
LPLOT
FLST,2,4,4
FITEM,2,8
FITEM,2,5
FITEM,2,10
FITEM,2,3
AL,P51X
FLST,2,4,4
FITEM,2,9
FITEM,2,12
FITEM,2,11
FITEM,2,10
AL,P51X
FLST,2,4,4
FITEM,2,11
FITEM,2,8
FITEM,2,6
FITEM,2,4
AL,P51X
FLST,2,4,4
FITEM,2,3
FITEM,2,1
FITEM,2,2
FITEM,2,4
AL,P51X
FLST,2,4,4
FITEM,2,5
FITEM,2,2
FITEM,2,7
FITEM,2,9
AL,P51X
FLST,2,4,4
FITEM,2,1
FITEM,2,6
FITEM,2,7
FITEM,2,12
AL,P51X
APLOT
FLST,2,6,5,ORDE,2
FITEM,2,1
FITEM,2,-6
VA,P51X
VPLOT
SAVE
SAVE
LPLOT
FLST,5,4,4,ORDE,2
FITEM,5,5
FITEM,5,-8
CM,_Y,LINE
LSEL, , , ,P51X
CM,_Y1,LINE
CMSEL,S,_Y
LESIZE,_Y1,0, ,8,0,4,0,0
CMDELE,_Y
CMDELE,_Y1
FLST,5,4,4,ORDE,2
FITEM,5,9
FITEM,5,-12
CM,_Y,LINE
LSEL, , , ,P51X
CM,_Y1,LINE
CMSEL,S,_Y
LESIZE,_Y1,0, ,4,0,4,0,0
CMDELE,_Y
CMDELE,_Y1
FLST,5,4,4,ORDE,2
FITEM,5,1
FITEM,5,-4
CM,_Y,LINE
LSEL, , , ,P51X
CM,_Y1,LINE
CMSEL,S,_Y
LESIZE,_Y1,0, ,4,0,4,0,0
CMDELE,_Y
CMDELE,_Y1
MSHAPE,0,3D
MSHKEY,1
CM,_Y,VOLU
VSEL, , , ,       1
CM,_Y1,VOLU
CHKMSH,'VOLU'
CMSEL,S,_Y
VMESH,_Y1
CMDELE,_Y
CMDELE,_Y1
CMDELE,_Y2
VPLOT
VPLOT
LPLOT
VPLOT
EPLOT
FLST,2,1,1,ORDE,1
FITEM,2,61
/GO
D,P51X, , , , , ,ALL, , , , ,
FLST,2,1,1,ORDE,1
FITEM,2,12
/GO
D,P51X, , , , , ,UX,UZ, , , ,
NPLOT
LPLOT
NPLOT
FLST,2,23,1,ORDE,8
FITEM,2,2
FITEM,2,10
FITEM,2,-11
FITEM,2,13
FITEM,2,46
FITEM,2,-60
FITEM,2,62
FITEM,2,-65
/GO
D,P51X, ,0, , , ,UZ, , , , ,
EPLOT
NPLOT
FLST,2,1,1,ORDE,1
FITEM,2,109
FLST,2,1,1,ORDE,1
FITEM,2,109
/GO
F,P51X,FX,10e-9
FINISH
/SOL
EPLOT
/STATUS,SOLU
/STATUS,SOLU
SOLVE
FINISH
/POST1
PLDISP,2
FINISH
/PREP7
FLST,2,225,1,ORDE,2
FITEM,2,1
FITEM,2,-225
FDELE,P51X,ALL
NPLOT
FLST,2,1,1,ORDE,1
FITEM,2,109
/GO
F,P51X,FY,10e-9
EPLOT
FINISH
/SOL
/STATUS,SOLU
SOLVE
FINISH
/POST26
FILE,'pyramid','rst','.'
NUMVAR,200
SOLU,191,NCMIT
STORE,MERGE
FILLDATA,191,,,,1,1
REALVAR,191,191
FINISH
/POST1
PLDISP,2
FINISH
/SOL
FINISH
/PREP7
FLST,2,225,1,ORDE,2
FITEM,2,1
FITEM,2,-225
FDELE,P51X,ALL
NPLOT
/PSF,DEFA, ,1,0,1
/PBF,DEFA, ,1
/PIC,DEFA, ,1
/PSYMB,CS,0
/PSYMB,NDIR,0
/PSYMB,ESYS,0
/PSYMB,LDIV,0
/PSYMB,LDIR,0
/PSYMB,ADIR,0
/PSYMB,ECON,0
/PSYMB,XNODE,0
/PSYMB,DOT,1
/PSYMB,PCONV,
/PSYMB,LAYR,0
/PSYMB,FBCS,0
/PBC,ALL,,1
/PBC,NFOR,,0
/PBC,NMOM,,0
/PBC,RFOR,,0
/PBC,RMOM,,0
/PBC,PATH,,0
FLST,2,1,1,ORDE,1
FITEM,2,109
/GO
F,P51X,FY,-10e-9
EPLOT
FINISH
/SOL
/STATUS,SOLU
SOLVE
FINISH
/POST1
PLDISP,2
/PSF,DEFA, ,1,0,1
/PBF,DEFA, ,1
/PIC,DEFA, ,1
/PSYMB,CS,0
/PSYMB,NDIR,0
/PSYMB,ESYS,0
/PSYMB,LDIV,0
/PSYMB,LDIR,0
/PSYMB,ADIR,0
/PSYMB,ECON,0
/PSYMB,XNODE,0
/PSYMB,DOT,1
/PSYMB,PCONV,
/PSYMB,LAYR,0
/PSYMB,FBCS,0
/PBC,ALL,,1
/PBC,NFOR,,0
/PBC,NMOM,,0
/PBC,RFOR,,0
/PBC,RMOM,,0
/PBC,PATH,,0
/EFACET,1
PLNSOL, U,SUM, 0,1.0
PLDISP,2
/PSF,DEFA, ,1,0,1
/PBF,DEFA, ,1
/PIC,DEFA, ,1
/PSYMB,CS,0
/PSYMB,NDIR,0
/PSYMB,ESYS,0
/PSYMB,LDIV,0
/PSYMB,LDIR,0
/PSYMB,ADIR,0
/PSYMB,ECON,0
/PSYMB,XNODE,0
/PSYMB,DOT,1
/PSYMB,PCONV,
/PSYMB,LAYR,0
/PSYMB,FBCS,0
/PBC,ALL, ,1
/PSF,DEFA, ,1,0,1
/PBF,DEFA, ,1
/PIC,DEFA, ,1
/PSYMB,CS,0
/PSYMB,NDIR,0
/PSYMB,ESYS,0
/PSYMB,LDIV,0
/PSYMB,LDIR,0
/PSYMB,ADIR,0
/PSYMB,ECON,0
/PSYMB,XNODE,0
/PSYMB,DOT,1
/PSYMB,PCONV,
/PSYMB,LAYR,0
/PSYMB,FBCS,0
/PBC,ALL, ,0
FINISH
! /EXIT,ALL
